new capacitor.CAP187214-1 bus1=BMT172016015.1.0,Phases=1,Conn=LN,Kvar=33.3333333333333,Kv=13.8
new capacitor.CAP187214-2 bus1=BMT172016015.2.0,Phases=1,Conn=LN,Kvar=33.3333333333333,Kv=13.8
new capacitor.CAP187214-3 bus1=BMT172016015.3.0,Phases=1,Conn=LN,Kvar=33.3333333333333,Kv=13.8
